units           real
atom_style      full
dimension 3
boundary        p p p

read_data       model_solvation/sol_r20.data

# Define groups
group water type 4 5 8      # 4 and 5 are H1 and H2 atoms, 8 is O atom
group mos2  type 6 13       # MoS2 backbone
group sol   type 1 2 3 4 5 7 8 9 10 11 12  # solvent and solution

# Pair style and kspace
pair_style      lj/cut/coul/long 3.0
#pair_style      lj/cut 2.5
special_bonds lj 0.0 0.0 0.5 coul 0.0 0.0 0.83333333
pair_modify     mix arithmetic
#kspace_style    pppm 1.0e-4
kspace_style ewald 1e-8

# Pair Coeff
pair_coeff 1 1     0.100   4.4000000   # Cl-Cl
pair_coeff 2 2     0.050   2.5000000   # CR-CR
pair_coeff 3 3     0.0157  1.0000000   # H-H
pair_coeff 4 4     0.0     0.0         # H1-H1
pair_coeff 5 5     0.0     0.0         # H1-H1
pair_coeff 6 6     0.003   3.2700000   # Mo-Mo
pair_coeff 7 7     0.0469  2.5900000   # Na-Na
pair_coeff 8 8     0.1521  3.1507      # OW-OW
pair_coeff 9 9     0.1000  3.0000000   # O1-O1
pair_coeff 10 10   0.1000  3.0000000   # O2-O2
pair_coeff 11 11   0.1000  3.0000000   # O3-O3
pair_coeff 12 12   0.1000  3.0000000   # O4-O4
pair_coeff 13 13   0.0086  3.5500000   # S-S

bond_style harmonic
bond_coeff 1 650 1.6800
bond_coeff 2 450 0.9572
bond_coeff 3 450 0.9572

angle_style     harmonic
angle_coeff 1 80 109.50
angle_coeff 2 55 104.52

## Minimize the system first
velocity all create 300.0 12345 dist gaussian mom yes rot yes
min_style cg
minimize 1.0e-4 1.0e-6 1000 10000

# *************** Setting ******************************
# Neighbor settings
neigh_modify delay 0 every 1 check yes
#neighbor        2.0 bin
#neigh_modify    delay 5 every 1

# Define SHAKE constraints for water (O-H bonds and H-O-H angle) and HCrO4 (Cr-O O-H bonds and O-Cr-O angle)
fix spce_model water shake 0.0001 20 0 b 1 2 3 a 1 2

# Fix MoS2 as rigid (zero force and velocity)
fix mos_hold mos2 setforce 0.0 0.0 0.0
velocity mos2 set 0.0 0.0 0.0

# Define small electric field along z (0.001 kcal/mol·e·Å)
fix fix_efield sol efield 0.0 0.0 0.001

# Set timestep
reset_timestep  0
timestep        0.5  # fs
fix fix_nvt sol nvt temp 300.0 300.0 100.0

# Thermostat output
thermo          100
thermo_style    custom step temp etotal press

dump d1 all custom 100 dump.lammpstrj id type x y z

# Run for 5 ns (5,000,000 steps)
run 50000
